// SBML level 2 version 4

model EnzymaticReaction()

  // Compartments:
  // Compartment cytosol note.
  compartment cytosol = 1e-14;

  // Species:
  // ES in the cytosol note
  species ES in cytosol = 0;
  // Product in the cytosol note
  species P in cytosol = 0;
  species S in cytosol = 1e-20/cytosol;
  species E in cytosol = 5e-21/cytosol;

  // Reactions:
  // Reaction, veq, note. This reaction is rather short so it may thrown out if necessary.
  veq: E + S -> ES; cytosol*(kon*E*S - koff*ES);
    kon = 1000000 litre_per_mole_per_second; koff = 0.2 per_second;
  vcat: ES => E + P; cytosol*kcat*ES;
    kcat = 0.1 per_second;

  // Unit definitions:
  unit per_second = 1 / second;
  unit litre_per_mole_per_second = litre / (mole * second);
end
