// SBML level 2 version 4

model main()
  // radioactive decay A short description: look at the decay rate. This the first comment fundamental units, creates exception gigatongrams This is another comment This model used to test exporting comments to SBML.

  // Parameters:
  // a summing variable
  sum_u has kilogram;
  // Just extra test.
  uab has kg_x_sec;
  rate = 1 _1_per_sec;
  // ODE variable declaration
  u = 1 kilogram;

  // Rate rules:
  // state equation for u
  u' = rate*u*(-1);

  // Unit definitions:
  unit gtg = 1;
  unit kg_per_sec = kilogram / second; kg_per_sec is "kg/sec";
  unit _1_per_sec = 1 / second; _1_per_sec is "1/sec";
  unit kg_x_sec = kilogram * second; kg_x_sec is "kg*sec";
end
