// SBML level 2 version 1

model mod()

  // Compartments:
  compartment comp1 = 10;

  // Species:
  substanceOnly species AmtAmtNone in comp1 = 5;
  substanceOnly species AmtNoneNone in comp1;
  species ConcAmtNone in comp1 = 5/comp1;
  species ConcConcNone in comp1 = 5;
  species ConcNoneNone in comp1;
  substanceOnly species AmtAmtAssn in comp1;
  substanceOnly species AmtNoneAssn in comp1;
  species ConcAmtAssn in comp1;
  species ConcConcAssn in comp1;
  species ConcNoneAssn in comp1;
  substanceOnly species AmtAmtRate in comp1 = 5;
  substanceOnly species AmtNoneRate in comp1;
  species ConcAmtRate in comp1 = 5/comp1;
  species ConcConcRate in comp1 = 5;
  species ConcNoneRate in comp1;
  substanceOnly species AmtAmtReac in comp1 = 5;
  substanceOnly species AmtNoneReac in comp1;
  species ConcAmtReac in comp1 = 5/comp1;
  species ConcConcReac in comp1 = 5;
  species ConcNoneReac in comp1;

  // Assignment rules:
  AmtAmtAssn := time;
  AmtNoneAssn := time;
  ConcAmtAssn := time;
  ConcConcAssn := time;
  ConcNoneAssn := time;

  // Rate rules:
  AmtAmtRate' = time;
  AmtNoneRate' = time;
  ConcAmtRate' = time;
  ConcConcRate' = time;
  ConcNoneRate' = time;

  // Reactions:
  AmtAmtReac: -> AmtAmtReac; time;
  AmtNoneReac: -> AmtNoneReac; time;
  ConcAmtReac: -> ConcAmtReac; time;
  ConcConcReac: -> ConcConcReac; time;
  ConcNoneReac: -> ConcNoneReac; time;
end
